a01 := 0.0559898
a11 := -0.959984
a21 := 0.0559898
qval := 2^15 = 32768
b01 := 1
b11 := 1.1882004
b21 := 0.3961783
a02 := 0.1995339
a12 := -0.1200433
a22 := 0.1995330
b02 := 1
b12 := 1.0777134
b22 := 0.5968228
a03 := 0.3999352
a13 := -0.0239101
a23 := 0.39999352
b03 := 1
b13 := 1.02568
b23 := 0.8590075
a01*qval = 1834.67
a11*qval = -31456.8
a21*qval = 1834.67
b01*qval = 32768
b21*qval = 12982
b11/2*qval = 19467.5
a02*qval = 6538.33
a12*qval = -3933.58
a22*qval = 6538.3
b02*qval = 32768
b22*qval = 19556.7
b12/2*qval = 17657.3
a03*qval = 13105.1
a13*qval = -783.486
a23*qval = 13107
b03*qval = 32768
b23*qval = 28148
b13/2*qval = 16804.7
